<?xml version="1.0" encoding="UTF-8"?>

<!--###################################################################################
    This file is licenced under the terms of the GNU General Public Licence V3 or later
    ###################################################################################
-->

<rocket_engine name="OMS">
	<isp>               313.0 </isp>
	<maxthrottle>      1.00 </maxthrottle>
	<minthrottle>      0.60 </minthrottle>
	<sloxiflowmax>   11.91 </sloxiflowmax>
	<slfuelflowmax>  7.23 </slfuelflowmax>
</rocket_engine>
